# 1 задание:
X := 0.1545  # Абсолютная погрешность
x := 0.155
k := |X - x|
k = 0.0005
# Относительная погрешность
δx := k/|x|*100*%
δx = 0.322581 %
# 2 задание:
а
x := 0.0842
Δx := 0.0015
Δx ≤ 1
0 - верно
Δx ≤ 0, 5
0 - верно
Δx ≤ 0, 1
0 - верно
Δx ≤ 0, 05
0 - верно
Δx ≤ 0, 01
8 - верно
Δx ≤ 0, 005
8 - верно
Δx ≤ 0, 001
4 - неверно
Δx ≤ 0, 0005
4 - верно
Δx ≤ 0, 0001
2 - неверно
Δx ≤ 0, 00005
2 - неверно
# В широком и строгом смысле верна только цифра 8
б
а := 0.11452
δа := 10 % = 0.1
# Найдем абсолютную погрешность:
Δа := |а|*δа
Δа = 0.011452
Δa ≤ 1
0 - верно
Δa ≤ 0, 5
0 - верно
Δa ≤ 0, 1
1 - верно
Δa ≤ 0, 05
1 - верно
Δa ≤ 0, 01
1 - неверно
Δa ≤ 0, 005
1 - неверно
Δa ≤ 0, 001
4 - неверно
Δa ≤ 0, 0005
4 - неверно
Δa ≤ 0, 0001
5 - неверно
Δa ≤ 0, 00005
5 - неверно
Δa ≤ 0, 00001
2 - неверно
Δa ≤ 0, 0000051
2 - неверно
# 3 задание:
a0 := 12.34
w0 := 4000
w := 5000
n := 4
a1 := 12.32
w1 := 3995
w3 := 4995
a2 := 12.36
w2 := 4005
w4 := 5005
# 1 случай | 2 случай | 3 случай
# Зафиксируем а0,w0 | Зафиксируем а0,w | Зафиксируем w0,w
a := a0/sqrt((1 - w3^2/w0^2)^2 + 4*n^2*w0^2/w3^2) = 1.9189
h := a0/sqrt((1 - w^2/w1^2)^2 + 4*n^2*w1^2/w^2) = 1.923
i := a1/sqrt((1 - w^2/w0^2)^2 + 4*n^2*w0^2/w^2) = 1.91761
b := a0/sqrt((1 - w4^2/w0^2)^2 + 4*n^2*w0^2/w4^2) = 1.92254
d := a0/sqrt((1 - w^2/w2^2)^2 + 4*n^2*w2^2/w^2) = 1.91844
z := a2/sqrt((1 - w^2/w0^2)^2 + 4*n^2*w0^2/w^2) = 1.92383
# В первом случае при увеличении w увеличивается
# и наша а
# Во втором случае при уменьшении w0 увеличивается а
# В третьем случае при увеличении а0 увеличивается и а
# Верхняя граница:
# w4,w1,a2
q := a2/sqrt((1 - w4^2/w1^2)^2 + 4*n^2*w1^2/w4^2) = 1.92795
# Нижняя граница:
# w3,w2,a1
o := a1/sqrt((1 - w3^2/w2^2)^2 + 4*n^2*w2^2/w3^2) = 1.91351
# Округляем верхнюю границу с избытком а нижнюю с недостатком
ВГ(а) := 1.93
НГ(а) := 1.91
# Тогда
Ga := (НГ(а) + ВГ(а))/2 = 1.92
Δy ≤ (ВГ(а) - НГ(а))/2 =  # error: Эта переменная неопределена.
